// SBML level 3 version 1

model Process(Cell, Matabolite, Matabolite_Requirement)

  // Compartments:
  compartment Cell = 1;

  // Species:
  substanceOnly species Matabolite in Cell = 100;
  substanceOnly species Protein in Cell = 0;
  substanceOnly species Substrate in Cell = 100;

  // Parameters:
  kd = 0.0075; kd is "Degradation rate";

  // Assignment rules:
  Matabolite_Requirement := 0.1*Substrate;

  // Reactions:
  R0: Matabolite + Substrate => Protein; R0_kf*Matabolite;
    R0_kf = 0.1; R0_kr = 1;
  Degradation_Protein: Protein => ; kd*Protein;
  r0: Protein => Substrate; r0_kf*Protein;
    r0_kf = 0.1; r0_kr = 1;
end
